dy/dx + p(x)*y == f(x)
# Метод вариации постоянной (Ла Гранжа)
# Решается соотв. однородное
y == c*e^(-integral(p(x), x))
# Предполагается, что c зависит от x
y == c(x)*e^(-integral(p(x), x))
# Подставляется в исходное и находится c(x)
# Метод Бернулли
y == U(x)*V(x)
dU/dx*V + U(dV/dx + p(x)*V) == f(x)
# Решается система
dV/dx + p(x)*V == 0
dU/dx*V == f(x)
