d^n/dx^n(y) + a[1]*d^(n - 1)/dx^(n - 1)(y) + ... + a[n]*y == 0
y == e^(λ*x)
# Решается характеристическое уравнение
# λ - корень
# R, кратность k:
e^(λ*x)
# ;
x*e^(λ*x)
# ;
...  # ;
x^(k - 1)*e^(λ*x)
# C, кратность k:
e^(α*x)*cos(β*x)
# ;
...
# ;
x^(k - 1)*e^(α*x)*cos(β*x)
e^(α*x)*sin(β*x)
# ;
...
# ;
x^(k - 1)*e^(α*x)*sin(β*x)
# Решение - линейная комбинация частных решений
