P(x, y)*dx + Q(x, y)*dy == 0  # - обобщ. однород., если сущ. альфа, такое что:
P(t*x, t^α*y)*t^0*dx + Q(t*x, t^α*y)*t^(α - 1)*dy == t^m*(P(x, y)*dx + Q(x, y)*dy)
(2/x^2 - y^2)*dx + dy == 0
2/x^2*dx - y^2*dx + dy == 0
# находим альфа
# степени:
-2 + 0 == 2*α == α - 1  # =>
α == -1
замена
y == z*x^α
