# приводящиеся к однородным д.у.
# было бы однородным, если бы без c1 и c2
dy/dx == f((a[1]*x + b[1]*y + c[1])/(a[2]*x + b[2]*y + c[2]))
# 1)
# Если
det([a[1], b[1]; a[2], b[2]]) ≠ 0
# замена
x == x[1] + k
y == y[1] + h
# решается система a1*k+b1*h+c1=0 a2*k+b2*h+c2=0
# 2)
# Если
det([a[1], b[1]; a[2], b[2]]) == 0
# то
dy/dx == f((a[1]*x + b[1]*y + c[1])/(λ*(a[1]*x + b[1]*y) + c[2]))
# замена z = a1*x+b1*y
