# Статистической зависимостью называется зависимость, при которой изменение одной из величин влечёт за собой изменение другой.
# Если при изменении одной из величин изменяется среднее значение другой, то зависимость называется корреляционной
# Задача - определить связь между признаками (величинами).
# Модель:
# y = a + bx
b := (M(xy) - M(x)*M(y))/σ_x^2  # disabled
a := M(y) - b*M(x)  # disabled
M(xy) := (x[1]*y[1] + ... + x[n]*y[n])/N  # disabled
# Коэффициент линейной корреляции
r := (M(xy) - M(x)*M(y))/(σ_x*σ_y)  # disabled
# r в диапазоне от -1 до 1. В 0 - не связаны. + или - зависит от знака зависимости (+ => с возрастанием x, возрастает и y)
