# Модель:
y := b[0] + b[1]*x[1] + ... + b[k]*x[k]  # error: Не удается распознать этот синтаксис.
# b находятся по формуле:
B := (transpose(X)*X)^-1*transpose(X)*Y  # error: Эта переменная не определена.
# Y - вектор размера k
X := [1, x[1, 1], ..., x[1, k]; 1, x[2, 1], ..., x[2, k]; ..., ..., ..., ...; 1, x[k, 1], ..., x[k, k]]  # error: Не удается распознать этот синтаксис.
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Y := [5; 10; 10; 7]
X := [1, 8, 5; 1, 11, 8; 1, 12, 8; 1, 9, 5]
B := (transpose(X)*X)^-1*transpose(X)*Y
B = [-4.16667; 1; 0.333333]
